# shear viscosity calculation

units		real
variable	T equal 86.4956
variable	V equal vol
variable	dt equal 4.0
variable	p equal 400     # correlation length
variable	s equal 50       # sample interval
variable	d equal $p*$s   # dump interval


# convert from LAMMPS real units to SI

variable	kB equal 1.3806504e-23
variable	atm2Pa equal 101325.0
variable	A2m equal 1.0e-10
variable	fs2s equal 1.0e-15
variable	convert equal ${atm2Pa}*${atm2Pa}*${fs2s}*${A2m}*${A2m}*${A2m}

# setup problem

dimension	3
boundary	p p p
lattice		fcc 5.376 orient x 1 0 0 orient y 0 1 0 orient z 0 0 1
region		box block 0 10 0 10 0 10
create_box	1 box
create_atoms	1 box
mass		1 39.948
pair_style	lj/cut 13.0
pair_coeff	* * 0.2381 3.405
timestep	${dt}
thermo		$d


#equilibration and thermalization

velocity	all create $T 102486 mom yes rot yes dist gaussian
fix		NVT all nvt temp $T $T 10 drag 0.2
run		8000

# viscosity calculation

reset_timestep 	0

compute 	stress all stress/atom NULL
compute		pressure all pressure thermo_temp

variable 	pxy equal pxy
variable	pxz equal pxz
variable	pyz equal pyz
variable	Pxx equal c_pressure[1]
variable	Pyy equal c_pressure[2]
variable	Pzz equal c_pressure[3]
variable	Pxy equal c_pressure[4]
variable	Pxz equal c_pressure[5]
variable	Pyz equal c_pressure[6]
variable	pressure_timestep equal step

fix 		extra all print 5 "${pressure_timestep} ${Pxx} ${Pyy} ${Pzz} ${pxy} ${pxz} ${pyz}" append pressure.xyz

variable	pxy equal pxy
variable	pxz equal pxz
variable	pyz equal pyz
fix		SS all ave/correlate $s $p $d v_pxy v_pxz v_pyz type auto file S0St.dat ave running
variable	scale equal ${convert}/(${kB}*$T)*$V*$s*${dt}
variable	v11 equal trap(f_SS[3])*${scale}
variable	v22 equal trap(f_SS[4])*${scale}
variable	v33 equal trap(f_SS[5])*${scale}
thermo_style	custom step temp press v_pxy v_pxz v_pyz c_pressure[*]
#dump		dmp all custom 500 test_*.xyz id c_stress[*]
#dump		dmp all custom 500 test_*.xyz c_pressure[*]
run 		20000
variable	v equal (v_v11+v_v22+v_v33)/3.0
variable	ndens equal count(all)/vol
print		"average viscosity: $v [Pa.s] @ $T K, ${ndens} /A^3"
print		"volume of the simulation box is ${V}"
